// SBML level 2 version 4

model id_simple_eye_ODE()
  // simple_eye_ODE

  // Compartments:
  compartment id_ODE_Overview = 1;
  compartment id_Aqueous_Compartment = 1;
  compartment id_Vitrious_Compartment = 1;
  compartment id_Retinal_Compartment = 1;
  compartment id_Serum_Compartment = 1;
  compartment id_Peripheral_Compartment = 1;

  // Species:
  substanceOnly species id_A in id_ODE_Overview = 0;  // substance in id_millimole
  substanceOnly species id_V in id_ODE_Overview = 0;  // substance in id_millimole
  substanceOnly species id_R in id_ODE_Overview = 0;  // substance in id_millimole
  substanceOnly species id_S in id_ODE_Overview = 0;  // substance in id_millimole
  substanceOnly species id_P in id_ODE_Overview = 0;  // substance in id_millimole

  // Parameters:
  id_ClA = 1 id_milliliter_day;
  id_k_Q = 1 id__1_day;
  id_Cl = 1 id__1_day;
  id_V2 = 420 id_milliliter;
  id_V1 = 530 id_milliliter;
  id_VA = 0.4 id_milliliter;
  id_kf = 1 id_millimole_millimole;
  id_k_VA = 1 id__1_day;
  id_k_VR = 1 id__1_day;
  id_k_R = 1 id__1_day;
  id_VR = 1 id_milliliter;
  id_VV = 1 id_milliliter;
  id_kf_1 = 1;
  id_kf_2 = 1;

  // Reactions:
  id_Clearance_Serum: id_S => ; id_Cl*id_S;
  id_R_serum_to_periphery: id_S -> id_S; (id_k_Q*id_S/id_V1 - id_k_Q*id_S/id_V2)*id_ODE_Overview;
  id_Aqueous_to_Serum: id_A => id_S; id_kf*id_ClA*id_A/id_VA;
  id_Retina_SerumTransport: id_A => id_S; id_kf*id_Retina_SerumTransport_id_k_R*id_A; id_Retina_SerumTransport is "Retina-SerumTransport";
    id_Retina_SerumTransport_id_k_R = 1 id__1_day;
  id_Exchange_Retinal_Vitrious: id_A -> id_A; id_k_VR*id_VV/id_VR*id_A - id_k_VR*id_A;
  id_Reaction_3: id_A => id_A; id_k_VA*id_A;
  id_aqueous_lost: id_A => ; (1 - id_kf)*id_ClA*id_A/id_VA;
  id_retinal_lost: id_A => ; (1 - id_kf)*id_k_R*id_A;

  // Unit definitions:
  unit id_millimole = 1e-3 mole;
  unit id_milliliter_day = metre^3 * 1.157407e-11 dimensionless / second; id_milliliter_day is "milliliter/day";
  unit id__1_day = 1.157407e-5 dimensionless / second; id__1_day is "1/day";
  unit id_milliliter = metre^3 * 1e-6 dimensionless;
  unit id_millimole_millimole = dimensionless; id_millimole_millimole is "millimole/millimole";
end
