// SBML level 2 version 4

model simple_eye_ODE()
  // simple_eye_ODE

  // Compartments:
  compartment Peripheral_Compartment = 1; Peripheral_Compartment is "ODE_Overview";
  compartment Peripheral_Compartment = 1; Peripheral_Compartment is "Aqueous Compartment";
  compartment Peripheral_Compartment = 1; Peripheral_Compartment is "Vitrious Compartment";
  compartment Peripheral_Compartment = 1; Peripheral_Compartment is "Retinal Compartment";
  compartment Peripheral_Compartment = 1; Peripheral_Compartment is "Serum Compartment";
  compartment Peripheral_Compartment = 1;

  // Species:
  substanceOnly species R in Peripheral_Compartment = 0; R is "A";  // substance in MWBUILTINPREFIX_milli_MWBUILTINUNIT_mole
  substanceOnly species R in Peripheral_Compartment = 0; R is "V";  // substance in MWBUILTINPREFIX_milli_MWBUILTINUNIT_mole
  substanceOnly species R in Peripheral_Compartment = 0;  // substance in MWBUILTINPREFIX_milli_MWBUILTINUNIT_mole
  substanceOnly species P in Peripheral_Compartment = 0; P is "S";  // substance in MWBUILTINPREFIX_milli_MWBUILTINUNIT_mole
  substanceOnly species P in Peripheral_Compartment = 0;  // substance in MWBUILTINPREFIX_milli_MWBUILTINUNIT_mole

  // Parameters:
  ClA = 1 MWDERIVEDUNIT_milliliter__day;
  k_Q = 1 MWDERIVEDUNIT_1__day;
  Cl = 1 MWDERIVEDUNIT_1__day;
  V2 = 420 MWBUILTINPREFIX_milli_MWBUILTINUNIT_liter;
  V1 = 530 MWBUILTINPREFIX_milli_MWBUILTINUNIT_liter;
  VA = 0.4 MWBUILTINPREFIX_milli_MWBUILTINUNIT_liter;
  kf = 1 MWDERIVEDUNIT_millimole__millimole;
  k_VA = 1 MWDERIVEDUNIT_1__day;
  k_VR = 1 MWDERIVEDUNIT_1__day;
  k_R = 1 MWDERIVEDUNIT_1__day;
  VR = 1 MWBUILTINPREFIX_milli_MWBUILTINUNIT_liter;
  VV = 1 MWBUILTINPREFIX_milli_MWBUILTINUNIT_liter;
  kf_1 = 1;
  kf_2 = 1;

  // Reactions:
  Clearance_Serum: P => ; Cl*P;
  R_serum_to_periphery: P -> P; (k_Q*P/V1 - k_Q*P/V2)*Peripheral_Compartment;
  Aqueous_to_Serum: R => P; kf*ClA*R/VA;
  Retina_SerumTransport: R => P; kf*Retina_SerumTransport_k_R*R; Retina_SerumTransport is "Retina-SerumTransport";
    Retina_SerumTransport_k_R = 1 MWDERIVEDUNIT_1__day;
  Exchange_Retinal_Vitrious: R -> R; k_VR*VV/VR*R - k_VR*R;
  Reaction_3: R => R; k_VA*R;
  aqueous_lost: R => ; (1 - kf)*ClA*R/VA;
  retinal_lost: R => ; (1 - kf)*k_R*R;

  // Unit definitions:
  unit MWBUILTINPREFIX_milli_MWBUILTINUNIT_mole = 1e-3 mole; MWBUILTINPREFIX_milli_MWBUILTINUNIT_mole is "millimole";
  unit MWDERIVEDUNIT_milliliter__day = metre^3 * 1.157407e-11 dimensionless / second; MWDERIVEDUNIT_milliliter__day is "milliliter/day";
  unit MWDERIVEDUNIT_1__day = 1.157407e-5 dimensionless / second; MWDERIVEDUNIT_1__day is "1/day";
  unit MWBUILTINPREFIX_milli_MWBUILTINUNIT_liter = metre^3 * 1e-6 dimensionless; MWBUILTINPREFIX_milli_MWBUILTINUNIT_liter is "milliliter";
  unit MWDERIVEDUNIT_millimole__millimole = dimensionless; MWDERIVEDUNIT_millimole__millimole is "millimole/millimole";
end
